# SELON CODATA 2014
# Vitesse de la lumière (m/s):
c := 299792458
# Constante de Planck (J*s):
h := 6.626070040*10^-34
# Masse de l'électron (kg):
me := 9.10938356*10^-31
# Rayon classique de l'électron (m):
re := 2.8179403227*10^-15
# Charge de l'électron (C):
qe := -1.6021766208*10^-19
# Masse du proton (kg):
mpr := 1.672621898*10^-27
# Masse du neutron (kg):
mn := 1.67493*10^-27
# Constante de structure fine (sans unités)
α := 7.2973525664*10^-3
# Constante de Rydberg à l'infini (m-1):
Rα := 10973731.5685
# Constante de Boltzmann (J/K)
kb := 1.38064852*10^-23
# Perméabilité du vide (N/A2):
μ0 := 4*π*10^-7
# Permittivité du vide (F/m):
ε0 := 1/(μ0*c^2)
# SELON WIKIPEDIA
# Masse solaire (kg):
ms := 1.9891*10^30
# Année (s):
an := 365.256363051*24*60*60
# Mega Parsec (m):
MParsec := 96939420213600000*10^6/π
# CALCULS SELON CLAUDE MERCIER ING. (voir site www.pragtec.com/physique)
# Rapport vitesse univers matériel / c
# (sans unités)
β := 3 - sqrt(5)
β = 0.763932
# Vitesse tangentielle de la lumière
# pour un temps infini (m/s)
k := c*sqrt(2 + sqrt(5))
k = 617024151
# Constante de gravitation
# universelle (m3/s*kg):
G := c^2*re*α^20/(me*β)
G = 6.67323e-11
# Constante de Hubble (km/MParsec*s):
H0 := c*α^19*sqrt(β)/re
H0*MParsec/1000 = 72.0955
# Nombre maximal de photons λ=2πRu
# dans univers (sans unités):
N := 1/α^57
N = 6.30342e121
# Rayon apparent de l'univers
# lumineux (m):
Ru := c/H0
Ru = 1.28311e26
# Rayon apparent de l'univers
# matériel (m):
ru := β*Ru
ru = 9.80207e25
# Masse apparente de l'univers (kg):
mu := c^3/(G*H0)
mu = 1.7281e53
# Masse du photon λ=2πRu (kg)
mph := mu/N
mph = 2.74153e-69
# Température moyenne CMB (K):
T := me*c^2/kb*(15*β^6*α^17/π^3)^(1/4)
T = 2.7368
# Longueur de Planck (m):
Lp := re*sqrt(α^19/β)
Lp = 1.61613e-35
# Masse de Planck (kg)::
mp := me*sqrt(β/α^21)
mp = 2.17661e-8
# Temps de Planck (s):
tp := re/c*sqrt(α^19/β)
tp = 5.39081e-44
# Température de Planck (K):
Tp := me*c^2/kb*sqrt(β/α^21)
Tp = 1.4169e32
# Charge de Planck (C)
qp := qe*sqrt(1/α)
qp = -1.87555e-18
